// SBML level 3 version 2

model ex01_simple_gene_expression()
  // model units - substance: mole, time: second, extent: mole

  // Compartments:
  compartment default_compartment = 1 litre;

  // Species:
  species mRNA in default_compartment = 0;
  species protein in default_compartment = 0;

  // Parameters:
  k_m = 1 per_second;
  d_m = 1 per_second;
  k_p = 1 per_second;
  d_p = 1 per_second;

  // Reactions:
  _J0: => mRNA; k_m;
  _J1: mRNA => ; d_m*mRNA;
  _J2: mRNA => mRNA + protein; k_p*mRNA;
  _J3: protein => ; d_p*protein;

  // Unit definitions:
  unit per_second = 1 / second;
end
