// SBML level 3 version 2

model ex02_two_genes_expression()
  // model units - substance: mole, time: second, extent: mole

  // Compartments:
  compartment default_compartment = 1 litre;

  // Species:
  species mRNA_A in default_compartment = 0;
  species protein_A in default_compartment = 0;
  species mRNA_B in default_compartment = 0;
  species protein_B in default_compartment = 0;

  // Parameters:
  k_m_A = 1 per_second;
  d_m_A = 1 per_second;
  k_p_A = 1 per_second;
  d_p_A = 1 per_second;
  k_m_B = 1 per_second;
  d_m_B = 1 per_second;
  k_p_B = 1 per_second;
  d_p_B = 1 per_second;

  // Reactions:
  _J0: => mRNA_A; k_m_A;
  _J1: mRNA_A => ; d_m_A*mRNA_A;
  _J2: mRNA_A => mRNA_A + protein_A; k_p_A*mRNA_A;
  _J3: protein_A => ; d_p_A*protein_A;
  _J4: => mRNA_B; k_m_B;
  _J5: mRNA_B => ; d_m_B*mRNA_B;
  _J6: mRNA_B => mRNA_B + protein_B; k_p_B*mRNA_B;
  _J7: protein_B => ; d_p_B*protein_B;

  // Unit definitions:
  unit per_second = 1 / second;
end
