// SBML level 3 version 2

model ex04_two_genes_expression()
  // model units - substance: mole, time: second, extent: mole

  // Compartments:
  compartment default_compartment = 1 litre;

  // Species:
  species A__mRNA in default_compartment = 0;
  species A__protein in default_compartment = 0;
  species B__mRNA in default_compartment = 0;
  species B__protein in default_compartment = 0;

  // Parameters:
  A__k_m = 1 per_second;
  A__d_m = 1 per_second;
  A__k_p = 1 per_second;
  A__d_p = 1 per_second;
  B__k_m = 1 per_second;
  B__d_m = 1 per_second;
  B__k_p = 1 per_second;
  B__d_p = 1 per_second;

  // Reactions:
  A___J0: => A__mRNA; A__k_m;
  A___J1: A__mRNA => ; A__d_m*A__mRNA;
  A___J2: A__mRNA => A__mRNA + A__protein; A__k_p*A__mRNA;
  A___J3: A__protein => ; A__d_p*A__protein;
  B___J4: => B__mRNA; B__k_m;
  B___J5: B__mRNA => ; B__d_m*B__mRNA;
  B___J6: B__mRNA => B__mRNA + B__protein; B__k_p*B__mRNA;
  B___J7: B__protein => ; B__d_p*B__protein;

  // Unit definitions:
  unit per_second = 1 / second;
end
