// SBML level 3 version 2

model ex06_antithetic_controller()
  // model units - substance: mole, time: second, extent: mole

  // Compartments:
  compartment default_compartment = 1 litre;

  // Species:
  species circuit__z1__mRNA in default_compartment = 0;
  species circuit__z1__protein in default_compartment = 0;
  species circuit__z2__mRNA in default_compartment = 0;
  species circuit__z2__protein in default_compartment = 0;
  species circuit__z2__k_m in default_compartment;
  species circuit__z2__TF in default_compartment;
  species circuit__x__mRNA in default_compartment = 0;
  species circuit__x__protein in default_compartment = 0;
  species circuit__x__k_m in default_compartment;
  species circuit__x__TF in default_compartment;

  // Parameters:
  circuit__z1__k_m = 1 per_second;
  circuit__z1__d_m = 1 per_second;
  circuit__z1__k_p = 1 per_second;
  circuit__z1__d_p = 1 per_second;
  circuit__z2__d_m = 1 per_second;
  circuit__z2__k_p = 1 per_second;
  circuit__z2__d_p = 1 per_second;
  circuit__z2__h = 1 per_second;
  circuit__z2__k_m_max = 1 per_second;
  circuit__x__d_m = 1 per_second;
  circuit__x__k_p = 1 per_second;
  circuit__x__d_p = 1 per_second;
  circuit__x__h = 1 per_second;
  circuit__x__k_m_max = 1 per_second;
  circuit__gamma = 1 per_second;

  // Assignment rules:
  circuit__z2__k_m := circuit__z2__k_m_max*circuit__z2__TF/(circuit__z2__TF + circuit__z2__h);
  circuit__x__k_m := circuit__x__k_m_max*circuit__x__TF/(circuit__x__TF + circuit__x__h);
  circuit__x__TF := circuit__z1__protein;
  circuit__z2__TF := circuit__x__protein;

  // Reactions:
  circuit__z1___J0: => circuit__z1__mRNA; circuit__z1__k_m;
  circuit__z1___J1: circuit__z1__mRNA => ; circuit__z1__d_m*circuit__z1__mRNA;
  circuit__z1___J2: circuit__z1__mRNA => circuit__z1__mRNA + circuit__z1__protein; circuit__z1__k_p*circuit__z1__mRNA;
  circuit__z1___J3: circuit__z1__protein => ; circuit__z1__d_p*circuit__z1__protein;
  circuit__z2___J4: => circuit__z2__mRNA; circuit__z2__k_m;  // modifiers: circuit__z2__k_m
  circuit__z2___J5: circuit__z2__mRNA => ; circuit__z2__d_m*circuit__z2__mRNA;
  circuit__z2___J6: circuit__z2__mRNA => circuit__z2__mRNA + circuit__z2__protein; circuit__z2__k_p*circuit__z2__mRNA;
  circuit__z2___J7: circuit__z2__protein => ; circuit__z2__d_p*circuit__z2__protein;
  circuit__x___J9: => circuit__x__mRNA; circuit__x__k_m;  // modifiers: circuit__x__k_m
  circuit__x___J10: circuit__x__mRNA => ; circuit__x__d_m*circuit__x__mRNA;
  circuit__x___J11: circuit__x__mRNA => circuit__x__mRNA + circuit__x__protein; circuit__x__k_p*circuit__x__mRNA;
  circuit__x___J12: circuit__x__protein => ; circuit__x__d_p*circuit__x__protein;
  circuit___J14: circuit__z1__protein + circuit__z2__protein => ; circuit__gamma*circuit__z1__protein*circuit__z2__protein;

  // Unit definitions:
  unit per_second = 1 / second;
end
